// SBML level 2 version 4

function Toehold_RNA_Transciption(k_transcription, Toehold_DNA)
  k_transcription*Toehold_DNA;
end

model Palaniappan2021_Cell_free_modelling_of_second_generation_Toehold_switches()
  // Palaniappan2021 - Cell free modelling of second generation Toehold switches
  // Cervical cancer is a global public health subject as it affects women in the reproductive ages, and accounts for the second largest burden among cancer patients worldwide with an unforgiving 50% mortality rate. Poor awareness and access to effective diagnosis have led to this enormous disease burden, calling for point-of-care, minimally invasive diagnosis methods. Here, an end-to-end quantitative approach for a new kind of diagnosis has been developed, comprising identification of optimal biomarkers, design of the sensor, and simulation of the diagnostic circuit. Using miRNA expression data in the public domain, we identified circulating miRNA biomarkers specific to cervical cancer using multi-tier screening. Synthetic riboregulators called toehold switches specific for the biomarker panel were then designed. To predict the dynamic range of toehold switches for use in genetic circuits as biosensors, we developed a generic grammar of these switches, and built a multivariate linear regression model using thermodynamic features derived from RNA secondary structure and interaction. The model yielded predictions of toehold efficacy with an adjusted R2 = 0.59. Reaction kinetics modelling was performed to predict the sensitivity of the second-generation toehold switches to the miRNA biomarkers. Simulations showed a linear response between 10nM and 100nM before saturation. Our study demonstrates an end-to-end workflow for the efficient design of genetic circuits geared towards the effective detection of unique genomic signatures that would be increasingly important in today’s world. The approach has the potential to direct experimental efforts and minimise costs. All resources are provided open-source (https://github.com/igem2019) under GNU GPLv3 licence.
  // occursIn NCIT:C15201
  // isPropertyOf MAMO:0000046
  // hasProperty NCIT:C16608 mamo:MAMO_0000046
  // isDescribedBy pubmed:35475253
  // biomodels.db:MODEL2406100001

  // Compartments:
  compartment Cell_Free_System = 1;  // hasInstance NCIT:C15201 NCIT:C16608; occursIn NCIT:C15201

  // Species:
  species miR in Cell_Free_System = 1.2e-7;  // hasProperty NCIT:C25966
  species antimiR in Cell_Free_System = 1.2e-7;  // hasProperty NCIT:C25966
  species Toehold_DNA in Cell_Free_System = 2.35e-7;  // encodes TEDDY:0000056
  species Toehold_RNA_CTS in Cell_Free_System = 0;  // hasPart TEDDY:0000056
  species miR_antimiR in Cell_Free_System = 0;  // isPartOf NCIT:C25966
  species GFP in Cell_Free_System = 0;  // isVersionOf FBcv:0005007
  species Toehold_RNA_OTS in Cell_Free_System = 0;  // hasProperty TEDDY:0000056
  species Mat_GFP in Cell_Free_System = 0;  // isPartOf FBcv:0005007

  // Parameters:
  Fluorescence_intensity has unit_0;
  Binding_CTS_miR_AntimIR has unit_1;
  CTS_Transcription has unit_2;
  RNA_decay has unit_2;

  // Assignment rules:
  Fluorescence_intensity := 79.429*Mat_GFP/10^(-7);
  CTS_Transcription := piecewise(0, time <= 7200, 0.0011);
  RNA_decay := piecewise(0.0003, time <= 7200, 0);
  Binding_CTS_miR_AntimIR := piecewise(0, time <= 7680, 100000);

  // Reactions:
  miR_antimiR_binding: miR + antimiR => miR_antimiR; Cell_Free_System*miR_antimiR_binding_k1*miR*antimiR;  // hasProperty GO:0003723
    miR_antimiR_binding_k1 = 100000;
  miR_decay: miR => ; Cell_Free_System*RNA_decay*miR;  // NCIT:C19144
  antimiR_decay: antimiR => ; Cell_Free_System*RNA_decay*antimiR;  // NCIT:C19144
  Toehold_RNA__Transcription: => Toehold_RNA_CTS; Cell_Free_System*Toehold_RNA_Transciption(CTS_Transcription, Toehold_DNA);  // modifiers: Toehold_DNA; NCIT:C17208
  Opening_Toehold_Switch: miR_antimiR + Toehold_RNA_CTS => Toehold_RNA_OTS; Cell_Free_System*Binding_CTS_miR_AntimIR*miR_antimiR*Toehold_RNA_CTS;  // isPartOf GO:0010501
  Toehold_RNA_CTS_decay: Toehold_RNA_CTS => ; Cell_Free_System*Toehold_RNA_CTS_decay_k1*Toehold_RNA_CTS;  // NCIT:C19144
    Toehold_RNA_CTS_decay_k1 = 0.0003;
  Toehold_RNA_OTS_decay: Toehold_RNA_OTS => ; Cell_Free_System*Toehold_RNA_OTS_decay_k1*Toehold_RNA_OTS;  // NCIT:C19144
    Toehold_RNA_OTS_decay_k1 = 0.0003;
  GFP_Translation: => GFP; Cell_Free_System*Toehold_RNA_Transciption(k_transcription, Toehold_RNA_OTS);  // modifiers: Toehold_RNA_OTS; GO:0006412
    k_transcription = 0.017;
  GFP_Maturation: GFP => Mat_GFP; Cell_Free_System*GFP_Maturation_k1*GFP;  // hasProperty GO:0051604
    GFP_Maturation_k1 = 0.0033;
  GFP_Decay: Mat_GFP => ; Cell_Free_System*GFP_Decay_k1*Mat_GFP;  // NCIT:C18104
    GFP_Decay_k1 = 5e-8;

  // Unit definitions:
  unit length = metre;
  unit area = metre^2;
  unit volume = litre;
  unit time = second;
  unit substance = mole;
  unit unit_0 = dimensionless^0; unit_0 is "1";
  unit unit_1 = litre / (mole * second); unit_1 is "l/(mol*s)";
  unit unit_2 = 1 / second; unit_2 is "1/s";
end
