// SBML level 3 version 2

model furr05()
  // Furr2005 - whole-body vitamin A metabolism in humans
  // "Stable isotope dilution techniques for assessing vitamin A status and bioefficacy of provitamin A carotenoids in humans" by Harold and his Furry friends (2005)
  // The original model was coded in WinSAAM. There the delay compartment was modelled as a series of connected pseudo-compartments. We use the same approach here.
  // isDescribedBy doi:10.1079/PHN2004715
  // biomodels.db:MODEL2405200001 biomodels.db:MODEL2406050001
  // hasTaxon taxonomy:9606
  // hasProperty mamo:MAMO_0000046 GO:0006776 mamo:MAMO_0000045
  // model units - substance: umol, time: day, volume: dimensionless, area: dimensionless, length: dimensionless, extent: umol

  // Compartments:
  compartment comp = 1 dimensionless;

  // Species:
  species M_1 in comp = 0; M_1 is "M_1 [gut]";  // hasPart CHEBI:50211
  species M_2 in comp = 0; M_2 is "M_2 [gut]";  // hasPart CHEBI:50211
  species M_4 in comp = 0; M_4 is "M_4 [liver]";  // hasPart CHEBI:50211
  species M_11 in comp = 0; M_11 is "M_11 [plasma]";  // hasPart CHEBI:50211
  species M_12 in comp = 0; M_12 is "M_12 [fast extravascular]";  // hasPart CHEBI:50211
  species M_13 in comp = 0; M_13 is "M_13 [slow extravascular]";  // hasPart CHEBI:50211
  species M_1_0 in comp = 1/comp; M_1_0 is "M_1^* [gut tracer]";  // hasPart CHEBI:50211
  species M_2_0 in comp = 0; M_2_0 is "M_2^* [gut tracer]";  // hasPart CHEBI:50211
  species M_4_0 in comp = 0; M_4_0 is "M_4^* [liver tracer]";  // hasPart CHEBI:50211
  species M_11_0 in comp = 0; M_11_0 is "M_11^* [plasma tracer]";  // hasPart CHEBI:50211
  species M_12_0 in comp = 0; M_12_0 is "M_12^* [fast extravascular tracer]";  // hasPart CHEBI:50211
  species M_13_0 in comp = 0; M_13_0 is "M_13^* [slow extravascular tracer]";  // hasPart CHEBI:50211
  species M_3_1 in comp = 0; M_3_1 is "M_3,1 [delay]";  // hasPart CHEBI:50211
  species M_3_2 in comp = 0; M_3_2 is "M_3,2 [delay]";  // hasPart CHEBI:50211
  species M_3_3 in comp = 0; M_3_3 is "M_3,3 [delay]";  // hasPart CHEBI:50211
  species M_3_4 in comp = 0; M_3_4 is "M_3,4 [delay]";  // hasPart CHEBI:50211
  species M_3_5 in comp = 0; M_3_5 is "M_3,5 [delay]";  // hasPart CHEBI:50211
  species M_3_6 in comp = 0; M_3_6 is "M_3,6 [delay]";  // hasPart CHEBI:50211
  species M_3_7 in comp = 0; M_3_7 is "M_3,7 [delay]";  // hasPart CHEBI:50211
  species M_3_8 in comp = 0; M_3_8 is "M_3,8 [delay]";  // hasPart CHEBI:50211
  species M_3_1_0 in comp = 0; M_3_1_0 is "M_3,1^* [delay tracer]";  // hasPart CHEBI:50211
  species M_3_2_0 in comp = 0; M_3_2_0 is "M_3,2^* [delay tracer]";  // hasPart CHEBI:50211
  species M_3_3_0 in comp = 0; M_3_3_0 is "M_3,3^* [delay tracer]";  // hasPart CHEBI:50211
  species M_3_4_0 in comp = 0; M_3_4_0 is "M_3,4^* [delay tracer]";  // hasPart CHEBI:50211
  species M_3_5_0 in comp = 0; M_3_5_0 is "M_3,5^* [delay tracer]";  // hasPart CHEBI:50211
  species M_3_6_0 in comp = 0; M_3_6_0 is "M_3,6^* [delay tracer]";  // hasPart CHEBI:50211
  species M_3_7_0 in comp = 0; M_3_7_0 is "M_3,7^* [delay tracer]";  // hasPart CHEBI:50211
  species M_3_8_0 in comp = 0; M_3_8_0 is "M_3,8^* [delay tracer]";  // hasPart CHEBI:50211

  // Parameters:
  U_1 = 12.4 umol_per_day;
  L_2_1 = 9.85 per_day;
  W_2 = 3.75 per_day;
  L_3_2 = 9.85 per_day;
  L_4_3 = 1 per_day;
  L_11_2 = 0.0614 per_day;
  L_11_4 = 1.43 per_day;
  L_12_11 = 4.32 per_day;
  L_11_12 = 0.924 per_day;
  L_13_11 = 4.26 per_day;
  L_11_13 = 0.0352 per_day;
  W_13 = 0.0232 per_day;
  t_1 = 1/L_2_1; t_1 has day;
  t_2 = 1/(W_2 + L_3_2 + L_11_2); t_2 has day;
  t_3 = 1/L_4_3; t_3 has day;
  t_4 = 1/L_11_4; t_4 has day;
  t_11 = 1/(L_12_11 + L_13_11); t_11 has day;
  t_12 = 1/L_11_12; t_12 has day;
  t_13 = 1/(L_11_13 + W_13); t_13 has day;
  T_1 has day;
  T_2 has day;
  T_3 has day;
  T_4 has day;
  T_11 has day;
  T_12 has day;
  T_13 has day;
  T has day;
  tau_3 = 0.2116667 day;
  TBS has umol; TBS is "total body stores";

  // Assignment rules:
  T_1 := M_1/U_1;
  T_2 := M_2/U_1;
  T_3 := tau_3;
  T_4 := M_4/U_1;
  T_11 := M_11/U_1;
  T_12 := M_12/U_1;
  T_13 := M_13/U_1;
  T := T_1 + T_2 + T_3 + T_4 + T_11 + T_12 + T_13;
  TBS := M_1 + M_2 + M_4 + M_11 + M_12 + M_13 + M_3_1 + M_3_2 + M_3_3 + M_3_4 + M_3_5 + M_3_6 + M_3_7 + M_3_8;

  // Reactions:
  u_1: => M_1; U_1;
  l_2_1: M_1 => M_2; L_2_1*M_1;
  w_2: M_2 => ; W_2*M_2;
  l_3_2: M_2 => M_3_1; L_3_2*M_2;
  l_4_3: M_3_8 => M_4; L_4_3*M_3_8;
  l_11_2: M_2 => M_11; L_11_2*M_2;
  l_11_4: M_4 => M_11; L_11_4*M_4;
  l_12_11: M_11 => M_12; L_12_11*M_11;
  l_11_12: M_12 => M_11; L_11_12*M_12;
  l_13_11: M_11 => M_13; L_13_11*M_11;
  l_11_13: M_13 => M_11; L_11_13*M_13;
  w_13: M_13 => ; W_13*M_13;
  l_2_1_0: M_1_0 => M_2_0; L_2_1*M_1_0;
  w_2_0: M_2_0 => ; W_2*M_2_0;
  l_3_2_0: M_2_0 => M_3_1_0; L_3_2*M_2_0;
  l_4_3_0: M_3_8_0 => M_4_0; L_4_3*M_3_8_0;
  l_11_2_0: M_2_0 => M_11_0; L_11_2*M_2_0;
  l_11_4_0: M_4_0 => M_11_0; L_11_4*M_4_0;
  l_12_11_0: M_11_0 => M_12_0; L_12_11*M_11_0;
  l_11_12_0: M_12_0 => M_11_0; L_11_12*M_12_0;
  l_13_11_0: M_11_0 => M_13_0; L_13_11*M_11_0;
  l_11_13_0: M_13_0 => M_11_0; L_11_13*M_13_0;
  w_13_0: M_13_0 => ; W_13*M_13_0;
  D_3_1: M_3_1 => M_3_2; 8/tau_3*M_3_1;
  D_3_2: M_3_2 => M_3_3; 8/tau_3*M_3_2;
  D_3_3: M_3_3 => M_3_4; 8/tau_3*M_3_3;
  D_3_4: M_3_4 => M_3_5; 8/tau_3*M_3_4;
  D_3_5: M_3_5 => M_3_6; 8/tau_3*M_3_5;
  D_3_6: M_3_6 => M_3_7; 8/tau_3*M_3_6;
  D_3_7: M_3_7 => M_3_8; 8/tau_3*M_3_7;
  D_3_1_0: M_3_1_0 => M_3_2_0; 8/tau_3*M_3_1_0;
  D_3_2_0: M_3_2_0 => M_3_3_0; 8/tau_3*M_3_2_0;
  D_3_3_0: M_3_3_0 => M_3_4_0; 8/tau_3*M_3_3_0;
  D_3_4_0: M_3_4_0 => M_3_5_0; 8/tau_3*M_3_4_0;
  D_3_5_0: M_3_5_0 => M_3_6_0; 8/tau_3*M_3_5_0;
  D_3_6_0: M_3_6_0 => M_3_7_0; 8/tau_3*M_3_6_0;
  D_3_7_0: M_3_7_0 => M_3_8_0; 8/tau_3*M_3_7_0;

  // Unit definitions:
  unit day = 86400 second;
  unit umol = 1e-6 mole;
  unit per_day = 1 / (86400 second);
  unit umol_per_day = 1e-6 mole / (86400 second);
end
